// SBML level 3 version 2

model irreversible_cpe()
  // model units - substance: mole, time: second, extent: mole

  // Compartments:
  compartment c = 1 dimensionless;  // 0-D

  // Species:
  species xA in c = 0;  // substance in dimensionless

  // Parameters:
  kpAA = 1 dimensionless;
  kpAB has dimensionless;
  kpBA has dimensionless;
  kpBB has dimensionless;
  rA = 1 dimensionless;
  rB = 1 dimensionless;
  rX = 1 dimensionless;
  A0 = 1 mole;
  B0 = 1 mole;
  A has mole;
  xB has dimensionless;
  B has mole;
  dA has dimensionless;
  dB has dimensionless;

  // Assignment rules:
  kpAB := kpAA/rA;
  kpBB := kpAA/rX;
  kpBA := kpBB/rB;
  A := A0*(1 - xA);
  B := (A0 + B0)*(1 - time) - A;
  xB := 1 - B/B0;
  dA := -A*(rA*A + B);
  dB := -B*(A + rB*B);

  // Rate rules:
  xA' = (A0 + B0)/A0*((dA + 1e-10)/(dA + dB + 1e-10));

  // Unit definitions:
  unit per_second = 1 / second;
end
