// SBML level 3 version 2

model main()
  // model units - substance: mole, time: second, extent: mole

  // Compartments:
  compartment c = 1 dimensionless;  // 0-D

  // Species:
  species xA in c = 0;  // substance in dimensionless
  species pA in c = 0.5/c;  // substance in dimensionless
  species pB in c;  // substance in dimensionless
  species pAA in c = 0.5/c;  // substance in dimensionless
  species pAB in c = 0.5/c;  // substance in dimensionless
  species pBA in c;  // substance in dimensionless
  species pBB in c;  // substance in dimensionless

  // Parameters:
  kpAA = 1 dimensionless;
  kpAB has dimensionless;
  kpBA has dimensionless;
  kpBB has dimensionless;
  kdAA has dimensionless;
  kdAB has dimensionless;
  kdBA has dimensionless;
  kdBB has dimensionless;
  rA = 1 dimensionless;
  rB = 1 dimensionless;
  rX = 1 dimensionless;
  KAA = 0 dimensionless;
  KAB = 0 dimensionless;
  KBA = 0 dimensionless;
  KBB = 0 dimensionless;
  A0 = 1 mole;
  B0 = 1 mole;
  A has mole;
  xB has dimensionless;
  B has mole;
  dA has dimensionless;
  dB has dimensionless;
  is_valid_xA = 1 dimensionless;

  // Assignment rules:
  kpAB := kpAA/rA;
  kpBB := kpAA/rX;
  kpBA := kpBB/rB;
  kdAA := kpAA*KAA;
  kdAB := kpAB*KAB;
  kdBA := kpBA*KBA;
  kdBB := kpBB*KBB;
  A := A0*(1 - xA);
  B := (A0 + B0)*(1 - time) - A;
  xB := 1 - B/B0;
  pB := 1 - pA;
  pBB := 1 - pAB;
  pBA := 1 - pAA;
  dA := -A*(kpAA*pA + kpBA*pB) + pA*(kdAA*pAA + kdBA*pBA);
  dB := -B*(kpBB*pB + kpAB*pA) + pB*(kdBB*pBB + kdAB*pAB);

  // Rate rules:
  xA' = (A0 + B0)/A0*((dA + 1e-10)/(dA + dB + 1e-10));

  // Algebraic rules:
  0 = kpAA*pBA*pA*A + kdAB*pAA*pAB*pB - pAA*pA*(kpAB*B + kdAA*pBA);
  0 = kpBB*pAB*pB*B + kdBA*pBB*pBA*pA - pBB*pB*(kpBA*A + kdBB*pAB);
  0 = kpAB*pA*B + pAB*(kdBA*pBA*pA + kdBB*pBB*pB) - pAB*pB*(kpBA*A + kpBB*B + kdAB);

  // Unit definitions:
  unit per_second = 1 / second;
end
